// SBML level 2 version 4

model mod1()

  // Compartments:
  compartment gut = 1 _L;
  compartment blood = 1*Vd*body_weight; blood has _L;

  // Species:
  substanceOnly species q_a in gut = 0;  // substance in _g
  species C in blood = 0;  // substance in _g

  // Parameters:
  BrAC has _g__L;
  k_a = 0.062 __h;
  Vd = 0.457 __kg_L;
  Vmax = 0.136 __h_g__L;
  Km = 0.096 _g__L;
  body_weight = 70 _kg;
  dose_first = 0.186 __kg_g;
  dose_last = 0.112 __kg_g;
  sigma_add = 0.1;
  sigma_prop = 0;

  // Assignment rules:
  BrAC := C/1;
  sigma1 := sqrt(sigma_add^2 + BrAC^2*sigma_prop^2);

  // Reactions:
  vabs: q_a => C; k_a*q_a;
  vel: C => ; 1*C*Vmax/(Km + C)*blood;

  // Events:
  adm1: at (true && (time >= 0)): q_a = q_a + dose_first*body_weight;
  adm2: at (true && (time >= 0.333)): q_a = q_a + dose_first*body_weight;
  adm3: at (true && (time >= 0.667)): q_a = q_a + dose_first*body_weight;
  adm4: at (true && (time >= 1.5)): q_a = q_a + dose_last*body_weight;

  // Unit definitions:
  unit _h = 3600 second;
  unit _L = litre;
  unit _g = 1e-3 kilogram;
  unit _g__L = 1e-3 kilogram / litre; _g__L is "g/L";
  unit __h_g = 1e-3 kilogram / (3600 second); __h_g is "g/h";
  unit __h = 1 / (3600 second); __h is "1/h";
  unit __kg_L = litre / kilogram; __kg_L is "L/kg";
  unit __h_g__L = 1e-3 kilogram / (litre * 3600 second); __h_g__L is "g/L/h";
  unit _kg = kilogram;
  unit __kg_g = 1e-3 dimensionless; __kg_g is "g/kg";
end
